# OpenSim document version 40000
MarkerSet:
  Marker RASI: pelvis (0.009406231 0.00444607 0.1242316)
  Marker LASI: pelvis (0.00940623 0.00444607 -0.124232)
  Marker LPSI: pelvis (-0.1629851 0.03840599 -0.05577829)
  Marker RHJC: femur_r (-0.003097156 0.00917997 -0.0056739) fixed=true
  Marker RTHAP: femur_r (0.0766921 -0.1338605 0.0276869)
  Marker RTHI: femur_r (0.0116448 -0.203043 0.0792525)
  Marker RTHAD: femur_r (0.0754307 -0.272816 0.0123491)
  Marker RKNM: femur_r (0.00862444 -0.410809 -0.0519894) fixed=true
  Marker RTIAP: tibia_r (0.04236759 -0.06278606 0.00844768)
  Marker RTIB: tibia_r (-0.005519634 -0.2381795 0.0570385)
  Marker RTIAD: tibia_r (0.02750763 -0.28601 0.004274875)
  Marker RANK: tibia_r (-0.0223721 -0.40165 0.049257) fixed=true
  Marker RMED: tibia_r (0.00711209 -0.39201 -0.0394654) fixed=true
  Marker RHEE: calcn_r (-0.0190614 0.0224383 -0.00814648)
  Marker RTOE: calcn_r (0.117601 0.0495523 -0.0119899)
  Marker RKJC: femur_r (0.00862444 -0.410809 0) fixed=true
  Marker RAJC: tibia_r (0.00127592 -0.3889198 0) fixed=true
  Marker RKNE: femur_r (0.00862444 -0.410809 0.0492517) fixed=true
  Marker LTOE: calcn_l (0.1176008 0.04955231 0.01198994)
  Marker LAJC: tibia_l (0.00127592 -0.38892 0) fixed=true
  Marker LHEE: calcn_l (-0.0190614 0.0224383 0.00814648)
  Marker LANK: tibia_l (-0.02237212 -0.40165 -0.049257) fixed=true
  Marker LMED: tibia_l (0.007112092 -0.3920097 0.03946538) fixed=true
  Marker LTIB: tibia_l (-0.00551963 -0.23818 -0.0570385)
  Marker LTIAD: tibia_l (0.0275076 -0.28601 -0.00427488)
  Marker LTIAP: tibia_l (0.0423676 -0.0627861 -0.00844768)
  Marker LKNM: femur_l (0.00862444 -0.410809 0.0519894) fixed=true
  Marker LKJC: femur_l (0.00862444 -0.410809 0) fixed=true
  Marker LKNE: femur_l (0.00862444 -0.410809 -0.0492517) fixed=true
  Marker LTHAP: femur_l (0.0766921 -0.13386 -0.0276869)
  Marker LTHI: femur_l (0.01164477 -0.2030431 -0.0792525)
  Marker LTHAD: femur_l (0.07543071 -0.272816 -0.0123491)
  Marker LHJC: femur_l (-0.00309716 0.00917997 -0.0056739) fixed=true
  Marker T2: torso (-0.08878261 0.3747819 0)
  Marker CLAV: torso (0.0431244 0.3750907 0)
  Marker LSHO: torso (0.0111273 0.4168 -0.148249)
  Marker RSHO: torso (0.01112734 0.4168004 0.1482487)
  Marker LELB: humerus_l (0.00802691 -0.282075 -0.0357162)
  Marker RUPA: humerus_r (0.00802691 -0.09902055 0.0357162)
  Marker RWRA: radius_r (-0.00160492 -0.228966 0.0433994)
  Marker LWRA: radius_l (-0.00160492 -0.2289658 -0.0433994)
  Marker LWRB: ulna_l (-0.02470085 -0.2447069 -0.007565785)
  Marker RWRB: ulna_r (-0.0247009 -0.244707 0.00756579)
  Marker LFIN: hand_l (-0.01861742 -0.08090579 -0.01754648)
  Marker RFIN: hand_r (-0.01822305 -0.06771342 0.016914)
  Marker T10: torso (-0.0898593 0.1825037 0)
  Marker RELB: humerus_r (0.00802691 -0.2820753 0.0357162)
  Marker LUPA: humerus_l (0.00802691 -0.1497227 -0.0357162)
  Marker LFRA: radius_l (-0.03181442 -0.121093 -0.01388366)
  Marker RFRA: radius_r (-0.03026336 -0.1203683 0.011396)
  Marker LVMH: toes_l (-0.0383078 0.02013591 -0.03871046)
  Marker LFMH: toes_l (-0.003469165 0.02305618 0.02484607)
  Marker RFMH: toes_r (-0.00346917 0.0230562 -0.0248461)
  Marker RVMH: toes_r (-0.0383078 0.0201359 0.0387105)
  Marker RPSI: pelvis (-0.162985 0.038406 0.0557783)
