# OpenSim document version 40000
InverseKinematicsTool:
  results_directory: ./
  constraint_weight: Inf
  accuracy: 1e-5
  marker_file: C:\LokaleDaten\CloudStation\deepForce\WP3-MSKmodeling\MedLat_Knee_Model_Lerner_et_al_v40\..\dataExamples\OSS\Dynamic11_marker.trc
  time_range: 2.2 3.38
  report_errors: true
  output_motion_file: C:\LokaleDaten\CloudStation\deepForce\WP3-MSKmodeling\MedLat_Knee_Model_Lerner_et_al_v40\..\dataExamples\OSS\_dynamic_IK
  report_marker_locations: false
  IKTaskSet:
    IKMarkerTask RASI: apply=true weight=25
    IKMarkerTask LASI: apply=true weight=25
    IKMarkerTask LPSI: apply=true weight=25
    IKMarkerTask RPSI: apply=true weight=25
    IKMarkerTask RHJC: apply=false weight=1
    IKMarkerTask RTHAP: apply=true weight=15
    IKMarkerTask RTHAD: apply=true weight=15
    IKMarkerTask RTHI: apply=true weight=15
    IKMarkerTask RKNM: apply=false weight=1
    IKMarkerTask RTIAP: apply=true weight=15
    IKMarkerTask RTIAD: apply=true weight=15
    IKMarkerTask RTHI: apply=true weight=15
    IKMarkerTask RANK: apply=true weight=25
    IKMarkerTask RMED: apply=false weight=1
    IKMarkerTask RHEE: apply=true weight=25
    IKMarkerTask RTOE: apply=true weight=15
    IKMarkerTask RKJC: apply=false weight=1
    IKMarkerTask RAJC: apply=false weight=1
    IKMarkerTask RKNE: apply=true weight=20
    IKMarkerTask LTOE: apply=true weight=15
    IKMarkerTask LAJC: apply=false weight=1
    IKMarkerTask LHEE: apply=true weight=25
    IKMarkerTask LANK: apply=true weight=25
    IKMarkerTask LMED: apply=false weight=1
    IKMarkerTask LTIAP: apply=true weight=15
    IKMarkerTask LTIAD: apply=true weight=15
    IKMarkerTask LTIB: apply=true weight=15
    IKMarkerTask LKNM: apply=false weight=1
    IKMarkerTask LKJC: apply=false weight=1
    IKMarkerTask LKNE: apply=true weight=20
    IKMarkerTask LTHAP: apply=true weight=15
    IKMarkerTask LTHAD: apply=true weight=15
    IKMarkerTask LTHI: apply=true weight=15
    IKMarkerTask LHJC: apply=false weight=1
    IKMarkerTask T2: apply=true weight=5
    IKMarkerTask LSHO: apply=true weight=2
    IKMarkerTask RSHO: apply=true weight=2
    IKMarkerTask LELB: apply=true weight=2
    IKMarkerTask RUPA: apply=true weight=2
    IKMarkerTask RWRA: apply=true weight=2
    IKMarkerTask LWRA: apply=true weight=2
    IKMarkerTask LWRB: apply=true weight=2
    IKMarkerTask RWRB: apply=true weight=2
    IKMarkerTask LFIN: apply=false weight=2
    IKMarkerTask RFIN: apply=false weight=2
    IKMarkerTask T10: apply=true weight=5
    IKMarkerTask RELB: apply=true weight=2
    IKMarkerTask LUPA: apply=true weight=2
    IKMarkerTask LFRA: apply=true weight=2
    IKMarkerTask RFRA: apply=true weight=2
    IKMarkerTask CLAV: apply=true weight=5
    IKMarkerTask LVMH: apply=true weight=15
    IKMarkerTask LFMH: apply=true weight=15
    IKMarkerTask RVMH: apply=true weight=15
    IKMarkerTask RFMH: apply=true weight=15
