# OpenSim document version 40000
AnalyzeTool LaiUhlrich2022-scaled:
  model_file: D:\LernerTestv1\lerner\MedLat_Knee_Model_Lerner_et_al_v4_0-scaled.osim
  replace_force_set: false
  results_directory: D:\LernerTestv1\lerner\Simulation\standard_Dynamic11_r\AnalyzeJointReaction
  output_precision: 8
  initial_time: 2.1533
  final_time: 3.2733
  solve_for_equilibrium_for_auxiliary_states: false
  maximum_number_of_integrator_steps: 20000
  maximum_integrator_step_size: 1
  minimum_integrator_step_size: 1e-8
  integrator_error_tolerance: 1e-5
  lowpass_cutoff_frequency_for_coordinates: 6
  AnalysisSet Analyses:
    JointReaction: start_time=2.1533 end_time=3.2733 step_interval=1 in_degrees=true joint_names=ALL
        apply_on_bodies=parent express_in_frame=parent
    Kinematics: start_time=0 end_time=1 step_interval=1 in_degrees=true
    BodyKinematics: start_time=0 end_time=1 step_interval=1 in_degrees=true bodies=all
        express_results_in_body_local_frame=false
    ForceReporter: start_time=0 end_time=1 step_interval=1 in_degrees=true include_constraint_forces=false
  ControllerSet Controllers:
    ControlSetController
