# OpenSim document version 40000
MarkerSet:
  Marker RASI: pelvis (-0.0006917173 0.00444607 0.1419767)
  Marker LASI: pelvis (0.000599218 0.00444607 -0.141977)
  Marker SACR: pelvis (-0.162985 0.025 0)
  Marker RHJC: femur_r (-0.003097156 0.00917997 -0.0056739) fixed=true
  Marker RT1: femur_r (0.0245009 -0.176222 0.0792525)
  Marker RT2: femur_r (-0.0295388 -0.272816 0.0792525)
  Marker RT3: femur_r (0.0494339 -0.272816 0.0792525)
  Marker RKNM: femur_r (0.00862444 -0.410809 -0.0519894) fixed=true
  Marker RS1: tibia_r (0.0245009 -0.176222 0.0792525)
  Marker RS2: tibia_r (-0.0295388 -0.272816 0.0792525)
  Marker RS3: tibia_r (0.0494339 -0.272816 0.0792525)
  Marker RANK: tibia_r (-0.0223721 -0.40165 0.049257)
  Marker RANM: tibia_r (0.00711209 -0.39201 -0.0394654) fixed=true
  Marker RHEE: calcn_r (-0.0190614 0.0224383 -0.00814648)
  Marker RTOE: calcn_r (0.1616639 0.02243827 0.01343133)
  Marker RKJC: femur_r (0.00862444 -0.410809 0) fixed=true
  Marker RAJC: tibia_r (0.00127592 -0.3889198 0) fixed=true
  Marker RKNE: femur_r (0.00862444 -0.410809 0.0492517)
  Marker LTOE: calcn_l (0.1616639 0.02243827 -0.01343128)
  Marker LAJC: tibia_l (0.00127592 -0.38892 0) fixed=true
  Marker LHEE: calcn_l (-0.0190614 0.0224383 0.00814648)
  Marker LANK: tibia_l (-0.02237212 -0.40165 -0.049257)
  Marker LANM: tibia_l (0.007112092 -0.3920097 0.03946538) fixed=true
  Marker LS2: tibia_l (-0.0295388 -0.272816 -0.0792525)
  Marker LS3: tibia_l (0.0494339 -0.272816 -0.0792525)
  Marker LS1: tibia_l (0.0245009 -0.176222 -0.0792525)
  Marker LKNM: femur_l (0.00862444 -0.410809 0.0519894) fixed=true
  Marker LKJC: femur_l (0.00862444 -0.410809 0) fixed=true
  Marker LKNE: femur_l (0.00862444 -0.410809 -0.0492517)
  Marker LT1: femur_l (0.0245009 -0.176222 -0.0792525)
  Marker LT2: femur_l (-0.0295388 -0.272816 -0.0792525)
  Marker LT3: femur_l (0.0494339 -0.272816 -0.0792525)
  Marker LHJC: femur_l (-0.00309716 0.00917997 -0.0056739) fixed=true
  Marker C7: torso (-0.0784382 0.4213812 0)
  Marker STRN: torso (0.0431244 0.3750907 0)
  Marker LSHO: torso (0.0111273 0.4168 -0.148249)
  Marker RSHO: torso (0.01112734 0.4168004 0.1482487)
  Marker T10: torso (-0.09714077 0.215348 0)
  Marker CLAV: torso (0.0906514 0.255922 0)
  Marker MIDASIS: pelvis (-4.62495e-5 0.00444607 0) fixed=true
  Marker MIDHJC: pelvis (-0.0593732 -0.06931 -0.0056739) fixed=true
  Marker LELB: humerus_l (0.00802691 -0.282075 -0.0357162)
  Marker RUPA: humerus_r (0.00802691 -0.09902055 0.0357162)
  Marker RWRA: radius_r (-0.00160492 -0.228966 0.0433994)
  Marker LWRA: radius_l (-0.00160492 -0.2289658 -0.0433994)
  Marker LWRB: ulna_l (-0.02470085 -0.2447069 -0.007565785)
  Marker RWRB: ulna_r (-0.0247009 -0.244707 0.00756579)
  Marker LFIN: hand_l (-0.01861742 -0.08090579 -0.01754648)
  Marker RFIN: hand_r (-0.01822305 -0.06771342 0.016914)
  Marker RELB: humerus_r (0.00802691 -0.2820753 0.0357162)
  Marker LUPA: humerus_l (0.00802691 -0.1497227 -0.0357162)
  Marker LFRA: radius_l (-0.03181442 -0.121093 -0.01388366)
  Marker RFRA: radius_r (-0.03026336 -0.1203683 0.011396)
