# OpenSim document version 40000
ScaleTool Rajagopal2015_passiveCal_hipAbdMoved-scaled:
  mass: 93.3 [kg]
  height: -1
  age: -1
  GenericModelMaker:
    marker_set_file: OSSnoArms_Cleveland_MarkerSet_LernerGopal.xml
  ModelScaler:
    apply: true
    scaling_order: measurements
    marker_file: E:\LocDat\GitHub\autoSIM\_commonFiles\dataExamples\OSS\Static.trc
    time_range: 0.013333 1.0067
    preserve_mass_distribution: true
    MeasurementSet:
      Measurement pelvis_xy: apply=true
        MarkerPair: markers=(RASI SACR)
        MarkerPair: markers=(LASI SACR)
        MarkerPair: markers=(MIDASIS SACR)
        BodyScale pelvis: axes=(X Y)
      Measurement pelvis_z: apply=true
        MarkerPair: markers=(RHJC LHJC)
        BodyScale pelvis: axes=Z
      Measurement femur_l: apply=true
        MarkerPair: markers=(LHJC LKJC)
        BodyScale femur_l: axes=(X Y Z)
        BodyScale femoral_cond_l: axes=(X Y Z)
        BodyScale sagittal_articulation_frame_l: axes=(X Y Z)
        BodyScale med_cond_l: axes=(X Y Z)
        BodyScale lat_cond_l: axes=(X Y Z)
        BodyScale patella_l: axes=(X Y Z)
      Measurement tibia_l: apply=true
        MarkerPair: markers=(LKJC LAJC)
        BodyScale tibial_plat_l: axes=(X Y Z)
        BodyScale tibia_l: axes=(X Y Z)
      Measurement foot_l: apply=true
        MarkerPair: markers=(LHEE LTOE)
        BodyScale talus_l: axes=(X Y Z)
        BodyScale calcn_l: axes=(X Y Z)
        BodyScale toes_l: axes=(X Y Z)
      Measurement femur_r: apply=true
        MarkerPair: markers=(RHJC RKJC)
        BodyScale femur_r: axes=(X Y Z)
        BodyScale femoral_cond_r: axes=(X Y Z)
        BodyScale sagittal_articulation_frame_r: axes=(X Y Z)
        BodyScale med_cond_r: axes=(X Y Z)
        BodyScale lat_cond_r: axes=(X Y Z)
        BodyScale patella_r: axes=(X Y Z)
      Measurement tibia_r: apply=true
        MarkerPair: markers=(RKJC RAJC)
        BodyScale tibial_plat_r: axes=(X Y Z)
        BodyScale tibia_r: axes=(X Y Z)
      Measurement foot_r: apply=true
        MarkerPair: markers=(RHEE RTOE)
        BodyScale talus_r: axes=(X Y Z)
        BodyScale calcn_r: axes=(X Y Z)
        BodyScale toes_r: axes=(X Y Z)
      Measurement torso_xy: apply=true
        MarkerPair: markers=(SACR C7)
        MarkerPair: markers=(RASI C7)
        MarkerPair: markers=(LASI C7)
        BodyScale torso: axes=(X Y)
      Measurement torso_z: apply=true
        MarkerPair: markers=(RSHO LSHO)
        BodyScale torso: axes=Z
      Measurement humerus_r: apply=true
        MarkerPair: markers=(RSHO RELB)
        BodyScale humerus_r: axes=(X Y Z)
      Measurement radius_r: apply=true
        MarkerPair: markers=(RELB RWRA)
        BodyScale ulna_r: axes=(X Y Z)
        BodyScale radius_r: axes=(X Y Z)
        BodyScale hand_r: axes=(X Y Z)
      Measurement humerus_l: apply=true
        MarkerPair: markers=(LSHO LELB)
        BodyScale humerus_l: axes=(X Y Z)
      Measurement radius_l: apply=true
        MarkerPair: markers=(LELB LWRA)
        BodyScale ulna_l: axes=(X Y Z)
        BodyScale radius_l: axes=(X Y Z)
        BodyScale hand_l: axes=(X Y Z)
  MarkerPlacer:
    apply: true
    marker_file: E:\LocDat\GitHub\autoSIM\_commonFiles\dataExamples\OSS\Static.trc
    time_range: 6.28167 1.0067
    max_marker_movement: -1
    IKTaskSet:
      IKMarkerTask RASI: apply=true weight=25
      IKMarkerTask LASI: apply=true weight=25
      IKMarkerTask SACR: apply=true weight=25
      IKMarkerTask RHJC: apply=true weight=15
      IKMarkerTask RT1: apply=true weight=0
      IKMarkerTask RT2: apply=true weight=0
      IKMarkerTask RT3: apply=true weight=0
      IKMarkerTask RKNM: apply=true weight=15
      IKMarkerTask RS1: apply=true weight=0
      IKMarkerTask RS2: apply=true weight=0
      IKMarkerTask RS3: apply=true weight=0
      IKMarkerTask RANK: apply=true weight=15
      IKMarkerTask RANM: apply=true weight=15
      IKMarkerTask RHEE: apply=true weight=15
      IKMarkerTask RTOE: apply=true weight=25
      IKMarkerTask RKJC: apply=true weight=20
      IKMarkerTask RAJC: apply=true weight=20
      IKMarkerTask RKNE: apply=true weight=15
      IKMarkerTask LTOE: apply=true weight=25
      IKMarkerTask LAJC: apply=true weight=20
      IKMarkerTask LHEE: apply=true weight=15
      IKMarkerTask LANK: apply=true weight=15
      IKMarkerTask LANM: apply=true weight=15
      IKMarkerTask LS2: apply=true weight=0
      IKMarkerTask LS3: apply=true weight=0
      IKMarkerTask LS1: apply=true weight=0
      IKMarkerTask LKNM: apply=true weight=15
      IKMarkerTask LKJC: apply=true weight=20
      IKMarkerTask LKNE: apply=true weight=15
      IKMarkerTask LT1: apply=true weight=0
      IKMarkerTask LT2: apply=true weight=0
      IKMarkerTask LT3: apply=true weight=0
      IKMarkerTask LHJC: apply=true weight=15
      IKMarkerTask C7: apply=true weight=5
      IKMarkerTask STRN: apply=true weight=5
      IKMarkerTask LSHO: apply=true weight=5
      IKMarkerTask RSHO: apply=true weight=5
      IKMarkerTask T10: apply=true weight=5
      IKMarkerTask CLAV: apply=true weight=5
      IKMarkerTask MIDASIS: apply=true weight=0
      IKMarkerTask MIDHJC: apply=true weight=0
      IKMarkerTask LELB: apply=true weight=1
      IKMarkerTask RUPA: apply=true weight=1
      IKMarkerTask RWRA: apply=true weight=1
      IKMarkerTask LWRA: apply=true weight=1
      IKMarkerTask LWRB: apply=true weight=1
      IKMarkerTask RWRB: apply=true weight=1
      IKMarkerTask LFIN: apply=true weight=1
      IKMarkerTask RFIN: apply=true weight=1
      IKMarkerTask RELB: apply=true weight=1
      IKMarkerTask LUPA: apply=true weight=1
      IKMarkerTask LFRA: apply=true weight=1
      IKMarkerTask RFRA: apply=true weight=1
