# OpenSim document version 20302
ForceSet lernergopal-scaled:
  PointActuator FX: body=pelvis point=(-0.0724376 0 0) point_is_global=false direction=(1 0 0) force_is_global=true
      optimal_force=100
  PointActuator FY: body=pelvis point=(-0.0724376 0 0) point_is_global=false direction=(0 1 0) force_is_global=true
      optimal_force=200
  PointActuator FZ: body=pelvis point=(-0.0724376 0 0) point_is_global=false direction=(0 0 1) force_is_global=true
      optimal_force=100
  TorqueActuator MX: bodyA=pelvis bodyB=ground torque_is_global=true axis=(1 0 0) optimal_force=80
  TorqueActuator MY: bodyA=pelvis bodyB=ground torque_is_global=true axis=(0 1 0) optimal_force=80
  TorqueActuator MZ: bodyA=pelvis bodyB=ground torque_is_global=true axis=(0 0 1) optimal_force=80
  CoordinateActuator pelvis_tilt_reserve: coordinate=pelvis_tilt optimal_force=1
  CoordinateActuator pelvis_list_reserve: coordinate=pelvis_list optimal_force=1
  CoordinateActuator pelvis_rotation_reserve: coordinate=pelvis_rotation optimal_force=1
  CoordinateActuator pelvis_tx_reserve: coordinate=pelvis_tx optimal_force=1
  CoordinateActuator pelvis_ty_reserve: coordinate=pelvis_ty optimal_force=1
  CoordinateActuator pelvis_tz_reserve: coordinate=pelvis_tz optimal_force=1
  CoordinateActuator hip_flexion_r_reserve: coordinate=hip_flexion_r optimal_force=1
  CoordinateActuator hip_adduction_r_reserve: coordinate=hip_adduction_r optimal_force=1
  CoordinateActuator hip_rotation_r_reserve: coordinate=hip_rotation_r optimal_force=1
  CoordinateActuator knee_angle_r_reserve: coordinate=knee_angle_r optimal_force=1
  CoordinateActuator knee_adduction_r_reserve: coordinate=knee_adduction_r optimal_force=100
  CoordinateActuator med_cond_adduction_r_reserve: coordinate=med_cond_adduction_r optimal_force=100
  CoordinateActuator lat_cond_adduction_r_reserve: coordinate=lat_cond_adduction_r optimal_force=100
  CoordinateActuator patella_r_constrained_knee_angle_reserve: coordinate=patella_r_constrained_knee_angle
      optimal_force=100
  CoordinateActuator ankle_angle_r_reserve: coordinate=ankle_angle_r optimal_force=1
  CoordinateActuator subtalar_angle_r_reserve: coordinate=subtalar_angle_r optimal_force=1
  CoordinateActuator mtp_angle_r_reserve: coordinate=mtp_angle_r optimal_force=100
  CoordinateActuator hip_flexion_l_reserve: coordinate=hip_flexion_l optimal_force=1
  CoordinateActuator hip_adduction_l_reserve: coordinate=hip_adduction_l optimal_force=1
  CoordinateActuator hip_rotation_l_reserve: coordinate=hip_rotation_l optimal_force=1
  CoordinateActuator knee_angle_l_reserve: coordinate=knee_angle_l optimal_force=1
  CoordinateActuator knee_adduction_l_reserve: coordinate=knee_adduction_l optimal_force=100
  CoordinateActuator med_cond_adduction_l_reserve: coordinate=med_cond_adduction_l optimal_force=100
  CoordinateActuator lat_cond_adduction_l_reserve: coordinate=lat_cond_adduction_l optimal_force=100
  CoordinateActuator patella_l_constrained_knee_angle_reserve: coordinate=patella_l_constrained_knee_angle
      optimal_force=100
  CoordinateActuator ankle_angle_l_reserve: coordinate=ankle_angle_l optimal_force=1
  CoordinateActuator subtalar_angle_l_reserve: coordinate=subtalar_angle_l optimal_force=1
  CoordinateActuator mtp_angle_l_reserve: coordinate=mtp_angle_l optimal_force=100
  CoordinateActuator lumbar_extension_reserve: coordinate=lumbar_extension optimal_force=1
  CoordinateActuator lumbar_bending_reserve: coordinate=lumbar_bending optimal_force=1
  CoordinateActuator lumbar_rotation_reserve: coordinate=lumbar_rotation optimal_force=1
