# OpenSim document version 40000
MarkerSet:
  Marker RASI: pelvis (0.02 0.009 0.128)
  Marker LASI: pelvis (0.02 0.009 -0.128)
  Marker SACR: pelvis (-0.15 0.05 0)
  Marker RHJC: femur_r (0 0 0) fixed=true
  Marker RT1: femur_r (0.035 -0.24 0.085)
  Marker RT2: femur_r (0.074 -0.283 0.085)
  Marker RT3: femur_r (0.032 -0.327 0.085)
  Marker RKNE: femur_r (0 -0.4 0.055) fixed=true
  Marker RS1: tibia_r (-0.02 -0.24 0.055)
  Marker RS2: tibia_r (-0.036 -0.323 0.055)
  Marker RS3: tibia_r (0.006 -0.329 0.055)
  Marker RANK: tibia_r (-0.01 -0.4 0.055) fixed=true
  Marker RHEE: calcn_r (-0.013 0.02 0.006)
  Marker RTOE: toes_r (-0.011 0.022 0.007)
  Marker RKJC: femur_r (0 -0.4 0) fixed=true
  Marker RAJC: tibia_r (-0.01 -0.4 0) fixed=true
  Marker LTOE: toes_l (-0.011 0.022 -0.007)
  Marker LAJC: tibia_l (-0.01 -0.4 0) fixed=true
  Marker LHEE: calcn_l (-0.013 0.02 0.006)
  Marker LANK: tibia_l (-0.01 -0.4 -0.055) fixed=true
  Marker LS1: tibia_l (-0.04 -0.24 -0.055)
  Marker LS2: tibia_l (-0.056 -0.323 -0.055)
  Marker LS3: tibia_l (0.005 -0.325 -0.055)
  Marker LKJC: femur_l (0 -0.4 0) fixed=true
  Marker LKNE: femur_l (0 -0.4 -0.055)
  Marker LT1: femur_l (0.035 -0.24 -0.085)
  Marker LT2: femur_l (0.014 -0.273 -0.085)
  Marker LT3: femur_l (0.048 -0.33 -0.085)
  Marker LHJC: femur_l (0 0 0) fixed=true
  Marker C7: torso (-0.085 0.41 0)
  Marker STRN: torso (0.1 0.22 0)
  Marker CLAV: torso (0.04 0.375 0)
  Marker LSHO: torso (0.0111273 0.4168 -0.148249)
  Marker RSHO: torso (0.01112734 0.4168004 0.1482487)
  Marker T10: torso (-0.09714077 0.215348 0)
  Marker RKNM: femur_r (0.00862444 -0.410809 -0.0519894)
  Marker RANM: tibia_r (0.00711209 -0.39201 -0.0394654)
  Marker LKNM: femur_l (0.00862444 -0.410809 0.0519894)
  Marker LANM: tibia_l (0.007112092 -0.3920097 0.03946538)
