# OpenSim document version 40000
AnalyzeTool lernergopal-scaled:
  replace_force_set: false
  force_set_files: reserve_actuators.xml
  results_directory: C:/LokaleDaten/CloudStation/deepForce/WP3-MSKmodeling/MedLat_Knee_Model_Lerner_et_al_v40/../dataExamples/OSS
  output_precision: 8
  initial_time: 2.197633
  final_time: 3.379033
  solve_for_equilibrium_for_auxiliary_states: false
  maximum_number_of_integrator_steps: 20000
  maximum_integrator_step_size: 1
  minimum_integrator_step_size: 1e-8
  integrator_error_tolerance: 1e-5
  external_loads_file: C:/LokaleDaten/CloudStation/deepForce/WP3-MSKmodeling/MedLat_Knee_Model_Lerner_et_al_v40/../dataExamples/OSS/Dynamic11_ExternalLoads.xml
  lowpass_cutoff_frequency_for_coordinates: 6
  AnalysisSet Analyses:
    StaticOptimization: start_time=2.197633 end_time=3.379033 step_interval=1 in_degrees=true use_model_force_set=true
        activation_exponent=2 use_muscle_physiology=true optimizer_convergence_criterion=0.0001
        optimizer_max_iterations=100
