# OpenSim document version 40000
ScaleTool Rajagopal2015_passiveCal_hipAbdMoved-scaled:
  mass: 93.3 [kg]
  height: -1
  age: -1
  GenericModelMaker:
    marker_set_file: C:\dumpFolder\V372\varModels\setupFiles\LernerGopalModels\OSS_FHSTPnoarms\OSS_Cleveland_MarkerSet_RajagopalUhlrich.xml
  ModelScaler:
    apply: true
    scaling_order: measurements
    marker_file: C:\LokaleDaten\SynologyCloud\StiftProf\05_Dissem_Marketing\2023_02_OpenCapProject\model\FullBodyModel_passiveCal_updHipAbdPaths_used\..\..\data\DynamicA01.trc
    time_range: 6.28167 6.4
    preserve_mass_distribution: true
    MeasurementSet:
      Measurement pelvis_x: apply=false
        MarkerPair: markers=(RASI SACR)
        MarkerPair: markers=(LASI SACR)
      Measurement pelvis_y: apply=false
        MarkerPair: markers=(RHJC RASI)
        MarkerPair: markers=(LHJC LASI)
        MarkerPair: markers=(RHJC SACR)
        MarkerPair: markers=(LHJC SACR)
      Measurement pelvis_z: apply=false
        MarkerPair: markers=(RHJC LHJC)
      Measurement femur_l: apply=true
        MarkerPair: markers=(LHJC LKJC)
        BodyScale femur_l: axes=(X Y Z)
        BodyScale femoral_cond_l: axes=(X Y Z)
        BodyScale sagittal_articulation_frame_l: axes=(X Y Z)
        BodyScale med_cond_l: axes=(X Y Z)
        BodyScale lat_cond_l: axes=(X Y Z)
        BodyScale patella_l: axes=(X Y Z)
      Measurement tibia_l: apply=true
        MarkerPair: markers=(LKJC LAJC)
        BodyScale tibial_plat_l: axes=(X Y Z)
        BodyScale tibia_l: axes=(X Y Z)
      Measurement foot_l: apply=true
        MarkerPair: markers=(LHEE LTOE)
        BodyScale talus_l: axes=(X Y Z)
        BodyScale calcn_l: axes=(X Y Z)
        BodyScale toes_l: axes=(X Y Z)
      Measurement femur_r: apply=true
        MarkerPair: markers=(RHJC RKJC)
        BodyScale femur_r: axes=(X Y Z)
        BodyScale femoral_cond_r: axes=(X Y Z)
        BodyScale sagittal_articulation_frame_r: axes=(X Y Z)
        BodyScale med_cond_r: axes=(X Y Z)
        BodyScale lat_cond_r: axes=(X Y Z)
        BodyScale patella_r: axes=(X Y Z)
      Measurement tibia_r: apply=true
        MarkerPair: markers=(RKJC RAJC)
        BodyScale tibial_plat_r: axes=(X Y Z)
        BodyScale tibia_r: axes=(X Y Z)
      Measurement foot_r: apply=true
        MarkerPair: markers=(RHEE RTOE)
        BodyScale talus_r: axes=(X Y Z)
        BodyScale calcn_r: axes=(X Y Z)
        BodyScale toes_r: axes=(X Y Z)
      Measurement pelvis_xyz: apply=false
        MarkerPair: markers=(RHJC LHJC)
        MarkerPair: markers=(MIDASIS SACR)
        BodyScale pelvis: axes=(X Y Z)
      Measurement torso_xy: apply=true
        MarkerPair: markers=(SACR C7)
        MarkerPair: markers=(SACR RSHO)
        MarkerPair: markers=(SACR LSHO)
        MarkerPair: markers=(C7 T10)
      Measurement torso_z: apply=true
        MarkerPair: markers=(RSHO LSHO)
      Measurement torso_xyz: apply=false
        MarkerPair: markers=(SACR C7)
        MarkerPair: markers=(RSHO LSHO)
        MarkerPair: markers=(RASI RSHO)
        MarkerPair: markers=(LASI LSHO)
        BodyScale torso: axes=(X Y Z)
    ScaleSet:
      Scale: scales=(999 999 999) segment=pelvis apply=true
  MarkerPlacer:
    apply: true
    marker_file: C:\LokaleDaten\SynologyCloud\StiftProf\05_Dissem_Marketing\2023_02_OpenCapProject\model\FullBodyModel_passiveCal_updHipAbdPaths_used\..\..\data\DynamicA01.trc
    time_range: 6.28167 6.4
    max_marker_movement: -1
    IKTaskSet:
      IKMarkerTask RASI: apply=true weight=15
      IKMarkerTask LASI: apply=true weight=15
      IKMarkerTask SACR: apply=true weight=30
      IKMarkerTask RHJC: apply=true weight=15
      IKMarkerTask RT1: apply=true weight=0
      IKMarkerTask RT2: apply=true weight=0
      IKMarkerTask RT3: apply=true weight=0
      IKMarkerTask RKNM: apply=true weight=15
      IKMarkerTask RS1: apply=true weight=0
      IKMarkerTask RS2: apply=true weight=0
      IKMarkerTask RS3: apply=true weight=0
      IKMarkerTask RANK: apply=true weight=15
      IKMarkerTask RANM: apply=true weight=15
      IKMarkerTask RHEE: apply=true weight=15
      IKMarkerTask RTOE: apply=true weight=25
      IKMarkerTask RKJC: apply=true weight=20
      IKMarkerTask RAJC: apply=true weight=20
      IKMarkerTask RKNE: apply=true weight=15
      IKMarkerTask LTOE: apply=true weight=25
      IKMarkerTask LAJC: apply=true weight=20
      IKMarkerTask LHEE: apply=true weight=15
      IKMarkerTask LANK: apply=true weight=15
      IKMarkerTask LANM: apply=true weight=15
      IKMarkerTask LS2: apply=true weight=0
      IKMarkerTask LS3: apply=true weight=0
      IKMarkerTask LS1: apply=true weight=0
      IKMarkerTask LKNM: apply=true weight=15
      IKMarkerTask LKJC: apply=true weight=20
      IKMarkerTask LKNE: apply=true weight=15
      IKMarkerTask LT1: apply=true weight=0
      IKMarkerTask LT2: apply=true weight=0
      IKMarkerTask LT3: apply=true weight=0
      IKMarkerTask LHJC: apply=true weight=15
      IKMarkerTask C7: apply=true weight=5
      IKMarkerTask STRN: apply=true weight=5
      IKMarkerTask LSHO: apply=true weight=5
      IKMarkerTask RSHO: apply=true weight=5
      IKMarkerTask T10: apply=true weight=5
      IKMarkerTask CLAV: apply=true weight=5
      IKMarkerTask LD5M: apply=true weight=25
      IKMarkerTask LD1M: apply=true weight=25
      IKMarkerTask RD1M: apply=true weight=25
      IKMarkerTask RD5M: apply=true weight=25
      IKMarkerTask MIDASIS: apply=true weight=0
      IKMarkerTask MIDHJC: apply=true weight=0
