# OpenSim document version 40000
InverseKinematicsTool:
  results_directory: ./
  constraint_weight: Inf
  accuracy: 1e-5
  marker_file: D:\Andreas_Gangdaten_short\2018-08-21\Walk6.trc
  time_range: 0.47333 5.4867
  report_errors: true
  report_marker_locations: false
  IKTaskSet:
    IKMarkerTask RASI: apply=true weight=15
    IKMarkerTask LASI: apply=true weight=15
    IKMarkerTask SACR: apply=true weight=20
    IKMarkerTask RT1: apply=true weight=20
    IKMarkerTask RT2: apply=true weight=20
    IKMarkerTask RT3: apply=true weight=20
    IKMarkerTask RS1: apply=true weight=20
    IKMarkerTask RS2: apply=true weight=20
    IKMarkerTask RS3: apply=true weight=20
    IKMarkerTask RANK: apply=true weight=20
    IKMarkerTask RHEE: apply=true weight=20
    IKMarkerTask RTOE: apply=true weight=20
    IKMarkerTask RKNE: apply=true weight=15
    IKMarkerTask LTOE: apply=true weight=20
    IKMarkerTask LHEE: apply=true weight=20
    IKMarkerTask LANK: apply=true weight=20
    IKMarkerTask LS2: apply=true weight=20
    IKMarkerTask LS3: apply=true weight=20
    IKMarkerTask LS1: apply=true weight=20
    IKMarkerTask LKNE: apply=true weight=15
    IKMarkerTask LT1: apply=true weight=20
    IKMarkerTask LT2: apply=true weight=20
    IKMarkerTask LT3: apply=true weight=20
    IKMarkerTask C7: apply=true weight=10
    IKMarkerTask STRN: apply=true weight=0
    IKMarkerTask LSHO: apply=true weight=20
    IKMarkerTask RSHO: apply=true weight=20
    IKMarkerTask LELB: apply=true weight=10
    IKMarkerTask RUPA: apply=true weight=5
    IKMarkerTask RWRA: apply=true weight=5
    IKMarkerTask LWRA: apply=true weight=5
    IKMarkerTask LWRB: apply=true weight=5
    IKMarkerTask RWRB: apply=true weight=5
    IKMarkerTask LFIN: apply=true weight=5
    IKMarkerTask RFIN: apply=true weight=5
    IKMarkerTask T10: apply=true weight=5
    IKMarkerTask RELB: apply=true weight=10
    IKMarkerTask LUPA: apply=true weight=5
    IKMarkerTask LFRA: apply=true weight=5
    IKMarkerTask RFRA: apply=true weight=5
    IKMarkerTask CLAV: apply=true weight=15
